<?xml version="1.0"?>
<!--
  File:     Sakae-Type12.xml
  Author:   Aero-Matic v 0.8

  Inputs:
    name:           Sakae-Type12
    type:           piston
    power:          950 hp
    minrpm:         1800
    maxrpm:         2550
    augmented?      no
    injected?       no
-->

<piston_engine name="Sakae-Type12">
  <minmp unit="INHG">          6.000 </minmp>
  <maxmp unit="INHG">         61.00 </maxmp>
  <displacement unit="IN3"> 1703.000 </displacement>
  <maxhp>        950.00 </maxhp>
  <cycles>         2.0 </cycles>
  <idlerpm>      550.0 </idlerpm>
  <maxthrottle>    1.0 </maxthrottle>
  <minthrottle>    0.2 </minthrottle>
</piston_engine>
